// SBML level 3 version 2

model model_initialize()
  // model units - substance: mole, time: second, extent: mole

  // Compartments:
  compartment default_compartment = 1 litre;

  // Species:
  species cell__s in default_compartment;
  species cell__m_h in default_compartment;
  species cell__p_r__nu_t in default_compartment;
  species cell__p_r__mu in default_compartment;
  species cell__p_r__r in default_compartment;
  species cell__p_r__m_h in default_compartment;
  species cell__p_r__J_host_sum in default_compartment;
  species cell__p_r__K_C0 in default_compartment;
  species cell__p_r__E_m in default_compartment;
  species cell__p_r__J in default_compartment;
  species cell__p_r__W in default_compartment;
  species cell__p_r__m in default_compartment = 100;
  species cell__p_r__r_t in default_compartment;
  species cell__p_nr__nu_t in default_compartment;
  species cell__p_nr__mu in default_compartment;
  species cell__p_nr__r in default_compartment;
  species cell__p_nr__m_h in default_compartment;
  species cell__p_nr__J_host_sum in default_compartment;
  species cell__p_nr__K_C0 in default_compartment;
  species cell__p_nr__E_m in default_compartment;
  species cell__p_nr__J in default_compartment;
  species cell__p_nr__W in default_compartment;
  species cell__p_nr__m in default_compartment = 100;
  species cell__nu_t in default_compartment;
  species cell__mu in default_compartment = 0.01;
  species cell__m_p in default_compartment;
  species cell__J_host_sum in default_compartment;
  species cell__WSum in default_compartment;
  species cell__phi_ht in default_compartment;
  species cell__r in default_compartment = 350;
  species cell__p_A__nu_t in default_compartment;
  species cell__p_A__mu in default_compartment;
  species cell__p_A__r in default_compartment;
  species cell__p_A__m_h in default_compartment;
  species cell__p_A__J_host_sum in default_compartment;
  species cell__p_A__K_C0 in default_compartment;
  species cell__p_A__E_m in default_compartment;
  species cell__p_A__J in default_compartment;
  species cell__p_A__W in default_compartment;
  species cell__p_A__m in default_compartment = 0;
  species mass__mu in default_compartment;
  species mass__m_h in default_compartment;

  // Parameters:
  cell__p_r__N = 55 per_second;
  cell__p_r__omega = 7.33 per_second;
  cell__p_r__d_m = 0.16 per_second;
  cell__p_r__k_b = 4.7627 per_second;
  cell__p_r__k_u = 119.7956 per_second;
  cell__p_r__l_p = 195 per_second;
  cell__p_r__l_e = 25 per_second;
  cell__p_r__weigth = 0.0045 per_second;
  cell__p_nr__N = 1735 per_second;
  cell__p_nr__omega = 0.0361 per_second;
  cell__p_nr__d_m = 0.2 per_second;
  cell__p_nr__k_b = 12.4404 per_second;
  cell__p_nr__k_u = 10.0454 per_second;
  cell__p_nr__l_p = 333 per_second;
  cell__p_nr__l_e = 25 per_second;
  cell__K_sc = 0.1802 per_second;
  cell__nu = 1260 per_second;
  cell__m_aa = 1.826e-7 per_second;
  cell__phi_m = 0.9473 per_second;
  cell__p_A__N = 1 per_second;
  cell__p_A__omega = 50 per_second;
  cell__p_A__d_m = 0.16 per_second;
  cell__p_A__k_b = 5.1754 per_second;
  cell__p_A__k_u = 117.2305 per_second;
  cell__p_A__l_p = 195 per_second;
  cell__p_A__l_e = 25 per_second;
  mass__c_1 = 239089 per_second;
  mass__c_2 = 7432 per_second;
  mass__c_3 = 37.06 per_second;
  __t_end = 1000000000 per_second;
  s = 3.6 per_second;

  // Assignment rules:
  cell__p_r__K_C0 := cell__p_r__k_b/(cell__p_r__k_u + cell__p_r__nu_t/cell__p_r__l_e);
  cell__p_r__E_m := 3.459;
  cell__p_r__J := cell__p_r__E_m*cell__p_r__omega/(cell__p_r__d_m/cell__p_r__K_C0 + cell__p_r__mu*cell__p_r__r);
  cell__p_r__W := cell__p_r__N*(1 + 1/cell__p_r__E_m)*cell__p_r__J;
  cell__p_r__r_t := cell__p_r__m/cell__p_r__weigth;
  cell__p_nr__K_C0 := cell__p_nr__k_b/(cell__p_nr__k_u + cell__p_nr__nu_t/cell__p_nr__l_e);
  cell__p_nr__E_m := 6.3492;
  cell__p_nr__J := cell__p_nr__E_m*cell__p_nr__omega/(cell__p_nr__d_m/cell__p_nr__K_C0 + cell__p_nr__mu*cell__p_nr__r);
  cell__p_nr__W := cell__p_nr__N*(1 + 1/cell__p_nr__E_m)*cell__p_nr__J;
  cell__p_r__nu_t := cell__nu_t;
  cell__p_r__mu := cell__mu;
  cell__p_r__r := cell__r;
  cell__p_r__m_h := cell__m_h;
  cell__p_r__J_host_sum := cell__J_host_sum;
  cell__p_nr__nu_t := cell__nu_t;
  cell__p_nr__mu := cell__mu;
  cell__p_nr__r := cell__r;
  cell__p_nr__m_h := cell__m_h;
  cell__p_nr__J_host_sum := cell__J_host_sum;
  cell__J_host_sum := cell__p_r__N*cell__p_r__J + cell__p_nr__N*cell__p_nr__J;
  cell__nu_t := cell__nu*cell__s/(cell__s + cell__K_sc);
  cell__phi_ht := (cell__p_r__N*cell__p_r__J + cell__p_nr__N*cell__p_nr__J)/(1 + cell__WSum);
  cell__WSum := cell__p_r__W + cell__p_nr__W + cell__p_A__W;
  cell__m_p := cell__p_r__m + cell__p_nr__m + cell__p_A__m;
  cell__p_A__K_C0 := cell__p_A__k_b/(cell__p_A__k_u + cell__p_A__nu_t/cell__p_A__l_e);
  cell__p_A__E_m := cell__p_A__l_p/cell__p_A__l_e*(1 - cell__p_A__l_p/(cell__p_A__l_p + cell__p_A__l_e)^(cell__p_A__l_p/cell__p_A__l_e));
  cell__p_A__J := cell__p_A__E_m*cell__p_A__omega/(cell__p_A__d_m/cell__p_A__K_C0 + cell__p_A__mu*cell__p_A__r);
  cell__p_A__W := cell__p_A__N*(1 + 1/cell__p_A__E_m)*cell__p_A__J;
  cell__p_A__nu_t := cell__nu_t;
  cell__p_A__mu := cell__mu;
  cell__p_A__r := cell__r;
  cell__p_A__m_h := cell__m_h;
  cell__p_A__J_host_sum := cell__J_host_sum;
  mass__m_h := mass__c_1*mass__mu*mass__mu + mass__c_2*mass__mu + mass__c_3;
  mass__mu := cell__mu;
  cell__m_h := mass__m_h;
  cell__s := s;

  // Algebraic rules:
  0 = cell__r - cell__phi_m*cell__p_r__r_t/(1 + cell__WSum);
  0 = cell__mu - cell__m_aa/cell__m_h*cell__nu_t*cell__phi_ht*cell__phi_m*cell__p_r__r_t;

  // Reactions:
  cell__p_r___J0: => cell__p_r__m; (cell__p_r__m_h*cell__p_r__N*cell__p_r__J/cell__p_r__J_host_sum - cell__p_r__m)*cell__p_r__mu;  // modifiers: cell__p_r__m_h, cell__p_r__J, cell__p_r__J_host_sum, cell__p_r__mu
  cell__p_nr___J1: => cell__p_nr__m; (cell__p_nr__m_h*cell__p_nr__N*cell__p_nr__J/cell__p_nr__J_host_sum - cell__p_nr__m)*cell__p_nr__mu;  // modifiers: cell__p_nr__m_h, cell__p_nr__J, cell__p_nr__J_host_sum, cell__p_nr__mu
  cell__p_A___J2: => cell__p_A__m; (cell__p_A__m_h*cell__p_A__N*cell__p_A__J/cell__p_A__J_host_sum - cell__p_A__m)*cell__p_A__mu;  // modifiers: cell__p_A__m_h, cell__p_A__J, cell__p_A__J_host_sum, cell__p_A__mu

  // Unit definitions:
  unit per_second = 1 / second;
end
