// SBML level 3 version 2

model antithetic_controller()
  // model units - substance: mole, time: second, extent: mole

  // Compartments:
  compartment default_compartment = 1 litre;

  // Species:
  species mass__mu in default_compartment;
  species mass__m_h in default_compartment;
  species cell__s in default_compartment;
  species cell__m_h in default_compartment;
  species cell__p_r__nu_t in default_compartment;
  species cell__p_r__mu in default_compartment;
  species cell__p_r__r in default_compartment;
  species cell__p_r__m_h in default_compartment;
  species cell__p_r__J_host_sum in default_compartment;
  species cell__p_r__K_C0 in default_compartment;
  species cell__p_r__E_m in default_compartment;
  species cell__p_r__J in default_compartment;
  species cell__p_r__W in default_compartment;
  species cell__p_r__m in default_compartment = 100;
  species cell__p_r__r_t in default_compartment;
  species cell__p_nr__nu_t in default_compartment;
  species cell__p_nr__mu in default_compartment;
  species cell__p_nr__r in default_compartment;
  species cell__p_nr__m_h in default_compartment;
  species cell__p_nr__J_host_sum in default_compartment;
  species cell__p_nr__K_C0 in default_compartment;
  species cell__p_nr__E_m in default_compartment;
  species cell__p_nr__J in default_compartment;
  species cell__p_nr__W in default_compartment;
  species cell__p_nr__m in default_compartment = 100;
  species cell__nu_t in default_compartment;
  species cell__mu in default_compartment = 0.01;
  species cell__m_p in default_compartment;
  species cell__J_host_sum in default_compartment;
  species cell__WSum in default_compartment;
  species cell__phi_ht in default_compartment;
  species cell__r in default_compartment = 350;
  species cell__x1__nu_t in default_compartment;
  species cell__x1__mu in default_compartment;
  species cell__x1__r in default_compartment;
  species cell__x1__m_h in default_compartment;
  species cell__x1__J_host_sum in default_compartment;
  species cell__x1__omega in default_compartment;
  species cell__x1__K_C0 in default_compartment;
  species cell__x1__E_m in default_compartment;
  species cell__x1__J in default_compartment;
  species cell__x1__W in default_compartment;
  species cell__x1__m in default_compartment = 0;
  species cell__x1__TF in default_compartment = 0;
  species cell__x2__nu_t in default_compartment;
  species cell__x2__mu in default_compartment;
  species cell__x2__r in default_compartment;
  species cell__x2__m_h in default_compartment;
  species cell__x2__J_host_sum in default_compartment;
  species cell__x2__omega in default_compartment;
  species cell__x2__K_C0 in default_compartment;
  species cell__x2__E_m in default_compartment;
  species cell__x2__J in default_compartment;
  species cell__x2__W in default_compartment;
  species cell__x2__m in default_compartment = 0;
  species cell__x2__TF in default_compartment;
  species cell__x12__nu_t in default_compartment;
  species cell__x12__mu in default_compartment;
  species cell__x12__r in default_compartment;
  species cell__x12__m_h in default_compartment;
  species cell__x12__J_host_sum in default_compartment;
  species cell__x12__K_C0 in default_compartment;
  species cell__x12__E_m in default_compartment;
  species cell__x12__J in default_compartment;
  species cell__x12__W in default_compartment;
  species cell__x12__m in default_compartment = 0;
  species cell__A__nu_t in default_compartment;
  species cell__A__mu in default_compartment;
  species cell__A__r in default_compartment;
  species cell__A__m_h in default_compartment;
  species cell__A__J_host_sum in default_compartment;
  species cell__A__omega in default_compartment;
  species cell__A__K_C0 in default_compartment;
  species cell__A__E_m in default_compartment;
  species cell__A__J in default_compartment;
  species cell__A__W in default_compartment;
  species cell__A__m in default_compartment = 0;
  species cell__A__TF in default_compartment;
  species cell__B__nu_t in default_compartment;
  species cell__B__mu in default_compartment;
  species cell__B__r in default_compartment;
  species cell__B__m_h in default_compartment;
  species cell__B__J_host_sum in default_compartment;
  species cell__B__omega in default_compartment;
  species cell__B__K_C0 in default_compartment;
  species cell__B__E_m in default_compartment;
  species cell__B__J in default_compartment;
  species cell__B__W in default_compartment;
  species cell__B__m in default_compartment = 0;
  species cell__B__TF in default_compartment;
  species cell__ref in default_compartment;

  // Parameters:
  mass__c_1 = 239089 per_second;
  mass__c_2 = 7432 per_second;
  mass__c_3 = 37.06 per_second;
  cell__p_r__N = 55 per_second;
  cell__p_r__omega = 7.33 per_second;
  cell__p_r__d_m = 0.16 per_second;
  cell__p_r__k_b = 4.7627 per_second;
  cell__p_r__k_u = 119.7956 per_second;
  cell__p_r__l_p = 195 per_second;
  cell__p_r__l_e = 25 per_second;
  cell__p_r__weigth = 0.0045 per_second;
  cell__p_nr__N = 1735 per_second;
  cell__p_nr__omega = 0.0361 per_second;
  cell__p_nr__d_m = 0.2 per_second;
  cell__p_nr__k_b = 12.4404 per_second;
  cell__p_nr__k_u = 10.0454 per_second;
  cell__p_nr__l_p = 333 per_second;
  cell__p_nr__l_e = 25 per_second;
  cell__K_sc = 0.1802 per_second;
  cell__nu = 1260 per_second;
  cell__m_aa = 1.826e-7 per_second;
  cell__phi_m = 0.9473 per_second;
  cell__x1__N = 1 per_second;
  cell__x1__d_m = 0.16 per_second;
  cell__x1__k_b = 4.7627 per_second;
  cell__x1__k_u = 119.7956 per_second;
  cell__x1__l_p = 195 per_second;
  cell__x1__l_e = 25 per_second;
  cell__x1__omega_max = 3 per_second;
  cell__x1__h = 100 per_second;
  cell__x2__N = 1 per_second;
  cell__x2__d_m = 0.16 per_second;
  cell__x2__k_b = 4.7627 per_second;
  cell__x2__k_u = 119.7956 per_second;
  cell__x2__l_p = 195 per_second;
  cell__x2__l_e = 25 per_second;
  cell__x2__omega_max = 1 per_second;
  cell__x2__h = 1 per_second;
  cell__x12__N = 1 per_second;
  cell__x12__omega = 0 per_second;
  cell__x12__d_m = 0.16 per_second;
  cell__x12__k_b = 4.7627 per_second;
  cell__x12__k_u = 119.7956 per_second;
  cell__x12__l_p = 195 per_second;
  cell__x12__l_e = 25 per_second;
  cell__A__N = 1 per_second;
  cell__A__d_m = 0.16 per_second;
  cell__A__k_b = 4.7627 per_second;
  cell__A__k_u = 119.7956 per_second;
  cell__A__l_p = 195 per_second;
  cell__A__l_e = 25 per_second;
  cell__A__omega_max = 10 per_second;
  cell__A__h = 1 per_second;
  cell__B__N = 1 per_second;
  cell__B__d_m = 0.16 per_second;
  cell__B__k_b = 4.7627 per_second;
  cell__B__k_u = 119.7956 per_second;
  cell__B__l_p = 195 per_second;
  cell__B__l_e = 25 per_second;
  cell__B__omega_max = 10 per_second;
  cell__B__h = 100 per_second;
  cell__gamma = 100000 per_second;
  cell____burden = 0 per_second;
  cell____dilution = 1 per_second;
  cell____openloop = 1 per_second;
  __t_end = 1000 per_second;
  s = 3.6 per_second;

  // Assignment rules:
  mass__m_h := mass__c_1*mass__mu*mass__mu + mass__c_2*mass__mu + mass__c_3;
  cell__p_r__K_C0 := cell__p_r__k_b/(cell__p_r__k_u + cell__p_r__nu_t/cell__p_r__l_e);
  cell__p_r__E_m := 3.459;
  cell__p_r__J := cell__p_r__E_m*cell__p_r__omega/(cell__p_r__d_m/cell__p_r__K_C0 + cell__p_r__mu*cell__p_r__r);
  cell__p_r__W := cell__p_r__N*(1 + 1/cell__p_r__E_m)*cell__p_r__J;
  cell__p_r__r_t := cell__p_r__m/cell__p_r__weigth;
  cell__p_nr__K_C0 := cell__p_nr__k_b/(cell__p_nr__k_u + cell__p_nr__nu_t/cell__p_nr__l_e);
  cell__p_nr__E_m := 6.3492;
  cell__p_nr__J := cell__p_nr__E_m*cell__p_nr__omega/(cell__p_nr__d_m/cell__p_nr__K_C0 + cell__p_nr__mu*cell__p_nr__r);
  cell__p_nr__W := cell__p_nr__N*(1 + 1/cell__p_nr__E_m)*cell__p_nr__J;
  cell__p_r__nu_t := cell__nu_t;
  cell__p_r__mu := cell__mu;
  cell__p_r__r := cell__r;
  cell__p_r__m_h := cell__m_h;
  cell__p_r__J_host_sum := cell__J_host_sum;
  cell__p_nr__nu_t := cell__nu_t;
  cell__p_nr__mu := cell__mu;
  cell__p_nr__r := cell__r;
  cell__p_nr__m_h := cell__m_h;
  cell__p_nr__J_host_sum := cell__J_host_sum;
  cell__J_host_sum := cell__p_r__N*cell__p_r__J + cell__p_nr__N*cell__p_nr__J;
  cell__nu_t := cell__nu*cell__s/(cell__s + cell__K_sc);
  cell__phi_ht := (cell__p_r__N*cell__p_r__J + cell__p_nr__N*cell__p_nr__J)/(1 + cell__WSum);
  cell__WSum := cell__p_r__W + cell__p_nr__W + cell__x1__W + cell__x2__W + cell__x12__W + cell__A__W + cell__B__W;
  cell__m_p := cell__p_r__m + cell__p_nr__m + cell__x1__m + cell__x2__m + cell__x12__m + cell__A__m + cell__B__m;
  cell__x1__K_C0 := cell__x1__k_b/(cell__x1__k_u + cell__x1__nu_t/cell__x1__l_e);
  cell__x1__E_m := cell__x1__l_p/cell__x1__l_e*(1 - cell__x1__l_p/(cell__x1__l_p + cell__x1__l_e)^(cell__x1__l_p/cell__x1__l_e));
  cell__x1__J := cell__x1__E_m*cell__x1__omega/(cell__x1__d_m/cell__x1__K_C0 + cell__x1__mu*cell__x1__r);
  cell__x1__W := cell__x1__N*(1 + 1/cell__x1__E_m)*cell__x1__J;
  cell__x1__omega := cell__x1__omega_max*cell__x1__TF/cell__x1__h;
  cell__x2__K_C0 := cell__x2__k_b/(cell__x2__k_u + cell__x2__nu_t/cell__x2__l_e);
  cell__x2__E_m := cell__x2__l_p/cell__x2__l_e*(1 - cell__x2__l_p/(cell__x2__l_p + cell__x2__l_e)^(cell__x2__l_p/cell__x2__l_e));
  cell__x2__J := cell__x2__E_m*cell__x2__omega/(cell__x2__d_m/cell__x2__K_C0 + cell__x2__mu*cell__x2__r);
  cell__x2__W := cell__x2__N*(1 + 1/cell__x2__E_m)*cell__x2__J;
  cell__x2__omega := cell__x2__omega_max*cell__x2__TF/cell__x2__h;
  cell__x12__K_C0 := cell__x12__k_b/(cell__x12__k_u + cell__x12__nu_t/cell__x12__l_e);
  cell__x12__E_m := cell__x12__l_p/cell__x12__l_e*(1 - cell__x12__l_p/(cell__x12__l_p + cell__x12__l_e)^(cell__x12__l_p/cell__x12__l_e));
  cell__x12__J := cell__x12__E_m*cell__x12__omega/(cell__x12__d_m/cell__x12__K_C0 + cell__x12__mu*cell__x12__r);
  cell__x12__W := cell__x12__N*(1 + 1/cell__x12__E_m)*cell__x12__J;
  cell__A__K_C0 := cell__A__k_b/(cell__A__k_u + cell__A__nu_t/cell__A__l_e);
  cell__A__E_m := cell__A__l_p/cell__A__l_e*(1 - cell__A__l_p/(cell__A__l_p + cell__A__l_e)^(cell__A__l_p/cell__A__l_e));
  cell__A__J := cell__A__E_m*cell__A__omega/(cell__A__d_m/cell__A__K_C0 + cell__A__mu*cell__A__r);
  cell__A__W := cell__A__N*(1 + 1/cell__A__E_m)*cell__A__J;
  cell__A__omega := cell__A__omega_max*cell__A__TF/cell__A__h;
  cell__B__K_C0 := cell__B__k_b/(cell__B__k_u + cell__B__nu_t/cell__B__l_e);
  cell__B__E_m := cell__B__l_p/cell__B__l_e*(1 - cell__B__l_p/(cell__B__l_p + cell__B__l_e)^(cell__B__l_p/cell__B__l_e));
  cell__B__J := cell__B__E_m*cell__B__omega/(cell__B__d_m/cell__B__K_C0 + cell__B__mu*cell__B__r);
  cell__B__W := cell__B__N*(1 + 1/cell__B__E_m)*cell__B__J;
  cell__B__omega := cell__B__omega_max*cell__B__TF/cell__B__h;
  cell__A__TF := cell__x1__m*(1 - cell____openloop);
  cell__x2__TF := cell__A__m*(1 - cell____openloop);
  cell__B__TF := cell____burden;
  cell__A__omega := cell__A__omega_max*(cell__A__TF/(cell__A__TF + cell__A__h) + cell____openloop);
  cell__B__omega := cell__B__omega_max*cell____burden;
  cell__x1__omega := cell__x1__omega_max*(1 - cell____openloop);
  cell__ref := cell__x1__J/(cell__x2__J*cell__x2__h/(cell__A__m*(1 - cell____openloop)))*cell__x2__h;
  cell__x1__nu_t := cell__nu_t;
  cell__x1__mu := cell__mu;
  cell__x1__r := cell__r;
  cell__x1__m_h := cell__m_h;
  cell__x1__J_host_sum := cell__J_host_sum;
  cell__x2__nu_t := cell__nu_t;
  cell__x2__mu := cell__mu;
  cell__x2__r := cell__r;
  cell__x2__m_h := cell__m_h;
  cell__x2__J_host_sum := cell__J_host_sum;
  cell__x12__nu_t := cell__nu_t;
  cell__x12__mu := cell__mu;
  cell__x12__r := cell__r;
  cell__x12__m_h := cell__m_h;
  cell__x12__J_host_sum := cell__J_host_sum;
  cell__A__nu_t := cell__nu_t;
  cell__A__mu := cell__mu;
  cell__A__r := cell__r;
  cell__A__m_h := cell__m_h;
  cell__A__J_host_sum := cell__J_host_sum;
  cell__B__nu_t := cell__nu_t;
  cell__B__mu := cell__mu;
  cell__B__r := cell__r;
  cell__B__m_h := cell__m_h;
  cell__B__J_host_sum := cell__J_host_sum;
  cell__s := s;
  mass__mu := cell__mu;
  cell__m_h := mass__m_h;

  // Algebraic rules:
  0 = cell__r - cell__phi_m*cell__p_r__r_t/(1 + cell__WSum);
  0 = cell__mu - cell__m_aa/cell__m_h*cell__nu_t*cell__phi_ht*cell__phi_m*cell__p_r__r_t;

  // Reactions:
  cell__p_r___J0: => cell__p_r__m; (cell__p_r__m_h*cell__p_r__N*cell__p_r__J/cell__p_r__J_host_sum - cell__p_r__m)*cell__p_r__mu;  // modifiers: cell__p_r__m_h, cell__p_r__J, cell__p_r__J_host_sum, cell__p_r__mu
  cell__p_nr___J1: => cell__p_nr__m; (cell__p_nr__m_h*cell__p_nr__N*cell__p_nr__J/cell__p_nr__J_host_sum - cell__p_nr__m)*cell__p_nr__mu;  // modifiers: cell__p_nr__m_h, cell__p_nr__J, cell__p_nr__J_host_sum, cell__p_nr__mu
  cell__x1___J2: => cell__x1__m; (cell__x1__m_h*cell__x1__N*cell__x1__J/cell__x1__J_host_sum - cell__x1__m)*cell__x1__mu;  // modifiers: cell__x1__m_h, cell__x1__J, cell__x1__J_host_sum, cell__x1__mu
  cell__x2___J3: => cell__x2__m; (cell__x2__m_h*cell__x2__N*cell__x2__J/cell__x2__J_host_sum - cell__x2__m)*cell__x2__mu;  // modifiers: cell__x2__m_h, cell__x2__J, cell__x2__J_host_sum, cell__x2__mu
  cell__x12___J4: => cell__x12__m; (cell__x12__m_h*cell__x12__N*cell__x12__J/cell__x12__J_host_sum - cell__x12__m)*cell__x12__mu;  // modifiers: cell__x12__m_h, cell__x12__J, cell__x12__J_host_sum, cell__x12__mu
  cell__A___J5: => cell__A__m; (cell__A__m_h*cell__A__N*cell__A__J/cell__A__J_host_sum - cell__A__m)*cell__A__mu;  // modifiers: cell__A__m_h, cell__A__J, cell__A__J_host_sum, cell__A__mu
  cell__B___J6: => cell__B__m; (cell__B__m_h*cell__B__N*cell__B__J/cell__B__J_host_sum - cell__B__m)*cell__B__mu;  // modifiers: cell__B__m_h, cell__B__J, cell__B__J_host_sum, cell__B__mu
  cell___J7: cell__x1__m + cell__x2__m => cell__x12__m; cell__gamma*cell__x1__m*cell__x2__m;
  cell___J8: => cell__x1__m; cell__mu*cell__x1__m*(1 - cell____dilution);  // modifiers: cell__mu
  cell___J9: => cell__x2__m; cell__mu*cell__x2__m*(1 - cell____dilution);  // modifiers: cell__mu
  cell___J10: => cell__x12__m; cell__mu*cell__x12__m*(1 - cell____dilution);  // modifiers: cell__mu

  // Unit definitions:
  unit per_second = 1 / second;
end
